# Задание 1
x := 2
n := 1 .. 10
n = [1; 2; 3; 4; 5; 6; 7; 8; 9; 10]
y(n) := (sqrt(x^3 + n) + cos(|n*x - 1|)^2)/(nthroot(x^5 + sin(x) + n, 4)*cos(π*(x + n)/4))
y(n) = [0; 0; 0; -8.90634e15; 0; 0; 0; 5.91154e15; 0; 0]
cos(30*π/180) = 0.866025
