# Задание 10
x[1] := -5
x[2] := 5
Δx := 0.1
x := x[1], x[1] + Δx .. x[2]
f(x) := x^2 + (x - 2)*sin(x) - 5
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x1_approach := -1.5
x1 := root(f(x1_approach), x1_approach) = -1.32936
x2_approach := 2
x2 := root(f(x2_approach), x2_approach) = 2.19967
f(x1) = -7.24754e-13
f(x2) = 3.52607e-13
f(x) := 2*x - 9
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x1_er := 4
xr := root(f(x1_er), x1_er) = 4.5
