# Задание 3
Δx := 0.4
x := -2, -1.6 .. 2
n := round(rnd(1)*9 + 1)
f(x) := (x^2 - n*x + sin(x))*sqrt(|x - cos(n*x)|)
f(x) = [6.40671; 3.96101; 2.13485; 0.884082; 0.196062; 0; 0.107857; 0.17913; 1.07268; 2.5012; 4.5222]
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