# Задание 4
n := round(rnd(1)*9 + 1)
a := -3*n
b := 3*n
VB := [a + (b - a)*rnd(1); a + (b - a)*rnd(1); a + (b - a)*rnd(1)]
VA := [a + (b - a)*rnd(1); a + (b - a)*rnd(1); a + (b - a)*rnd(1)]
VB = [-1.84006; 0.510037; -0.898151]
VA = [1.93703; -1.95523; 1.26297]
VC := [a + (b - a)*rnd(1); a + (b - a)*rnd(1); a + (b - a)*rnd(1)]
VC = [-1.17608; -2.45153; -2.11612]
# Скалярное произведение А и В
VS2 := VA[0]*VB[0] + VA[1]*VB[1] + VA[2]*VB[2]
VS1 := VA*VB
VS1 = -5.69583
VS2 = -5.69583
# Векторное произведение В и С
VV1 := VB×VC
VV2 := [VB[1]*VC[2] - VB[2]*VC[1]; VB[2]*VC[0] - VB[0]*VC[2]; VB[0]*VC[1] - VB[1]*VC[0]]
VV1 = [-3.28115; -2.83749; 5.11082]
VV2 = [-3.28115; -2.83749; 5.11082]
# Смешанное произведение А, В и С
VW1 := (VA×VB)*VC
VWab := [VA[1]*VB[2] - VA[2]*VB[1]; VA[2]*VB[0] - VA[0]*VB[2]; VA[0]*VB[1] - VA[1]*VB[0]]
VW1 = 5.64709
VW2 := VWab[0]*VC[0] + VWab[1]*VC[1] + VWab[2]*VC[2]
VW2 = 5.64709
# Вектор с наибольшей длиной
len := if((|VA| > |VB|) and (|VA| > |VC|), "Это А", if((|VB| > |VA|) and (|VB| > |VC|), "Это B", "Это С"))
len = "Это С"
lenVB := sqrt(VB[0]^2 + VB[1]^2 + VB[2]^2)
lenVA := sqrt(VA[0]^2 + VA[1]^2 + VA[2]^2)
lenVB = 2.11013
lenVA = 3.02821
lenVC := sqrt(VC[0]^2 + VC[1]^2 + VC[2]^2)
lenVC = 3.44545
# Массив М
size := 10
i := 0 .. size - 1
j := 0 .. size - 1
M[i, j] := round(-10 + 20*rnd(1))
M = [
    10, -8, -10, 1, 2, -7, -1, -9, 6, 0;
    8, 9, 1, -1, 7, 6, 10, 2, -5, 7;
    -2, 4, -10, -4, 2, 7, 0, 5, -1, 5;
    2, 5, 1, -7, -1, 0, 5, -7, 0, 4;
    -7, -7, 4, -1, 9, -7, 6, -6, 6, -7;
    5, -4, 4, 4, -8, 7, 0, -1, 9, 1;
    -1, 7, -1, 10, 5, -6, 7, 0, -9, 1;
    1, 7, 3, 7, -8, -4, -4, -7, 7, 2;
    -5, -10, 6, -6, 1, -8, 5, 1, -1, 4;
    -1, 2, 3, 0, 4, -6, -6, -1, -8, -8
]
sumM := sum(sum(M[i, j], j = 0 .. 9), i = 0 .. 9)
sumM2 := sum(M[строка, 2], строка = 0 .. 9)
sumM = 26
sumM2 = 1
sumPositive := sum(sum(if(M[i, j] > 0, M[i, j], 0), j = 0 .. 9), i = 0 .. 9)
sum(M[:, 2]) = 1
sumPositive = 247
p := -4 .. 5
sumNegative := sum(sum(if(M[i, j] < 0, M[i, j], 0), j = 0 .. 9), i = 0 .. 9)
FFF := runif(4, -4, 5) = [4.38341; 4.05141; -1.95413; -0.303594]
sumNegative = -221
Y := transpose(M)[:, size - 1] = [-1; 2; 3; 0; 4; -6; -6; -1; -8; -8]
X := M[:, 0] = [10; 8; -2; 2; -7; 5; -1; 1; -5; -1]
P := X*Y = -5
