# Задание 5
x := -3*π .. 3*π
y(x) := e^(-(|x|/3))*cos(x)
y(x) = [-0.0432139; -0.0325856; 0.0350268; 0.116292; 0.107158; -0.0649007; -0.306592; -0.335964; 0.090491; 0.790838; 0.692671; -0.00261785; -0.357656; -0.275584; -0.0297547; 0.118451; 0.106992; 0.0220275; -0.0378758]
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