# Задание 6
x1 := -9
Δx := 0.25
x := x1, x1 + Δx .. 9
f(x) := if(x < 0, e^x*x^3, e^(-x)*x^3)
f(x) = [
    -0.0899657; -0.106157; -0.124955; -0.146701; -0.171757; -0.200504; -0.233332; -0.270632; -0.312776; -0.3601
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]
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f(1975) = 0
