f(x) := sin(π*x)*sqrt(|x|)
x_1 := -6
x_2 := 6
Δx := 0.1
x_LW := 100
y_LW := 200
x_HW := 800
y_HW := 900
N := round((x_2 - x_1)/Δx) = 120
i := 0 .. N
X[i] := x_1 + i*Δx
Y[i] := f(X[i])
Z[i] := 1
x_L := min(X) = -6
y_H := max(Y) = 2.34521
x_H := max(X) = 6
y_L := min(Y) = -2.34521
M_S := stack(transpose(X), transpose(Y), transpose(Z))
Δx_W := x_HW - x_LW = 700
Δx := x_H - x_L = 12
Δy_W := y_HW - y_LW = 700
Δy := y_H - y_L = 4.69042
k_x := Δx_W/Δx = 58.3333
k_y := Δy_W/Δy = 149.241
T_SW := [k_x, 0, x_LW - k_x*x_L; 0, -k_y, y_HW + k_y*y_L; 0, 0, 1] = [58.3333, 0, 450; 0, -149.241, 550; 0, 0, 1]
M_W := T_SW*M_S
X_W := transpose(M_W)[:, 0]
Y_W := transpose(M_W)[:, 1]
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# В мировой системе координат
# В оконной системе координат
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